*Heading
 Project2_traction on right side
** Job name: TheJob Model name: Model-1
** Generated by: Abaqus/CAE Student Edition 2020
*Preprint, echo=NO, model=NO, history=NO, contact=NO
**
** PARTS
**
*Part, name=Plate
*Node
      1,           2.,           1.
      2,   1.60000002,           1.
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*Element, type=CPS8R
 1,  1,  2,  8,  7, 25, 26, 27, 28
 2,  2,  3,  9,  8, 29, 30, 31, 26
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*Nset, nset=Bottom
 19, 20, 21, 22, 23, 24, 53, 56, 58, 60, 62
*Elset, elset=bot, generate
 11,  15,   1
*Nset, nset=Left
  6, 12, 18, 24, 39, 50, 61
*Elset, elset=left, generate
  5,  15,   5
*Nset, nset=Right
  1,  7, 13, 19, 28, 43, 54
*Elset, elset=right, generate
  1,  11,   5
*Nset, nset=all, generate
  1,  62,   1
*Elset, elset=all, generate
  1,  15,   1
*Elset, elset=_right_S4, internal, generate
  1,  11,   5
*Surface, type=ELEMENT, name=right
_right_S4, S4
** Section: SteelSection
*Solid Section, elset=all, material=Steel
,
*End Part
**
**
** ASSEMBLY
**
*Assembly, name=Assembly
**
*Instance, name=Plate-1, part=Plate
*End Instance
**
*End Assembly
**
** MATERIALS
**
*Material, name=Steel
*Elastic
 9e+10, 0.33
**
** BOUNDARY CONDITIONS
**
** Name: SymBot Type: Symmetry/Antisymmetry/Encastre
*Boundary
Plate-1.bot, YSYMM
** Name: SymLeft Type: Symmetry/Antisymmetry/Encastre
*Boundary
Plate-1.left, XSYMM
** ----------------------------------------------------------------
**
** STEP: Traction
**
*Step, name=Traction, nlgeom=NO
Traction on plate with hole
*Static
1., 1., 1e-05, 1.
**
** LOADS
**
** Name: Traction   Type: Surface traction
*Dsload
Plate-1.right, TRVEC, 2e+07, 1., 0., 0.
**
** OUTPUT REQUESTS
**
*Restart, write, frequency=0
**
** FIELD OUTPUT: F-Output-1
**
*Output, field, variable=PRESELECT
**
** HISTORY OUTPUT: H-Output-1
**
*Output, history, variable=PRESELECT
*End Step
